module commercial;
module tape;

clock {
	timezone US/CA/Los Angeles;
	starttime '2018-01-01 00:00:00 PST';
	stoptime '2018-01-02 00:00:00 PST';
}
object ceus {
	name small_office;
	filename "test_ceus.csv";
	floor_area 10 ksf;
	composition "Heating:{ZR:0.9;PR:0.1;PI:0.01}";
	composition "Cooling:{ZR:0.9;PR:0.1;PI:0.01}";
	composition "Vent:{ZR:0.9;PR:0.1;PI:0.01}";
	composition "WaterHeat:{ZR:0.9;PR:0.1;PI:0.01}";
	composition "Refrig:{ZR:0.9;PR:0.1;PI:0.01}";
	composition "ExtLight:{ZR:0.9;PR:0.1;PI:0.01}";
	composition "IntLight:{ZR:0.9;PR:0.1;PI:0.01}";
	composition "OfficeEquip:{ZR:0.9;PR:0.1;PI:0.01}";
	composition "Misc:{ZR:0.9;PR:0.1;PI:0.01}";
	composition "Process:{ZR:0.9;PR:0.1;PI:0.01}";
	composition "Motors:{ZR:0.9;PR:0.1;PI:0.01}";
	composition "AirComp:{ZR:0.9;PR:0.1;PI:0.01}";
	object recorder {
		file test_ceus_small_office.csv;
		property total_power_A,total_power_B,total_power_C,total_real_power,total_reactive_power;
		interval 1h;
	};
}
object ceus {
	name large_office;
	filename "test_ceus.csv";
	floor_area 100 ksf;
	composition "Heating:{ZR:0.9;PR:0.1;PI:0.01}";
	composition "Cooling:{ZR:0.9;PR:0.1;PI:0.01}";
	composition "Vent:{ZR:0.9;PR:0.1;PI:0.01}";
	composition "WaterHeat:{ZR:0.9;PR:0.1;PI:0.01}";
	composition "Refrig:{ZR:0.9;PR:0.1;PI:0.01}";
	composition "ExtLight:{ZR:0.9;PR:0.1;PI:0.01}";
	composition "IntLight:{ZR:0.9;PR:0.1;PI:0.01}";
	composition "OfficeEquip:{ZR:0.9;PR:0.1;PI:0.01}";
	composition "Misc:{ZR:0.9;PR:0.1;PI:0.01}";
	composition "Process:{ZR:0.9;PR:0.1;PI:0.01}";
	composition "Motors:{ZR:0.9;PR:0.1;PI:0.01}";
	composition "AirComp:{ZR:0.9;PR:0.1;PI:0.01}";
	object recorder {
		file test_ceus_large_office.csv;
		property total_power_A,total_power_B,total_power_C,total_real_power,total_reactive_power;
		interval 1h;
	};
}
