// generated by /Users/dchassin/Documents/github/slacgismo/gridlabd/converters/idf2glm.py on 2022-11-16 14:36:37.768235
// output to autotest/test_idf2glm_output.glm
class building {
	char32 weather;
	double occupancy[unit/sf];
	double lighting[W/sf];
	double equipment[W/sf];
	double floor_area[sf];
	double perimeter[ft];
}

// input from autotest/test_idf2glm_input.idf
object building {
	name "_MidriseApartment-ASHRAE 169-2006-3C created: 2021-02-17 08:39:";
	latitude 37.62;
	longitude -122.4;
	weather ${GEOCODE 37.62,-122.4#6};
	occupancy 0.0179 unit/m^2;
	lighting 8.4 W/m^2;
	equipment 4.3 W/m^2;
	floor_area 127.5 m^2;
	perimeter 45.9 m;
}
#set savefile=${modelname/.glm/.json}
