object triplex_meter
{
	name "meter${ID}";
	phases AS;
	nominal_voltage 120 V;
}

object house
{
	parent "meter${ID}";
}


object billing
{
	meter "meter${ID}";
	tariff "${TARIFF}";
	baseline_demand 10.5 kWh/day;
}
